<?xml version="1.0"?>
<!--
	File:     Saturn 127.xml
	Author:   Peter Brendt with Aeromatic and changes

	Inputs:
	name:           Saturn 127
	type:           turbine
	thrust:         65000 lb
	augmented?      yes
	injected?       yes
-->

<turbine_engine name="Saturn 127">
	<milthrust> 45000.0 </milthrust>
	<maxthrust> 67500.0 </maxthrust>
	<bypassratio>     0.2 </bypassratio> <!-- was 1.0 -->
	<tsfc>            0.8 </tsfc>
	<atsfc>           1.7 </atsfc>
	<bleed>           0.03</bleed>
	<idlen1>         10.0 </idlen1>
	<idlen2>         60.0 </idlen2>
	<maxn1>         100.0 </maxn1>
	<maxn2>         100.0 </maxn2>
	<augmented>         1 </augmented>
	<augmethod>         1 </augmethod>
	<injected>          1 </injected>

	<function name="IdleThrust">
		<table>
			<independentVar lookup="row">velocities/mach</independentVar>
			<independentVar lookup="column">atmosphere/density-altitude</independentVar>
			<tableData>
					-10000      0      10000      20000      30000      40000      50000      60000      70000      80000      90000      100000
				0.0      0.0430     0.0488 0.0528     0.0694     0.0899     0.1183     0.1467     0.1200     0.0800     0.0400     0.0200     0
				0.2      0.0500     0.0501 0.0335     0.0544     0.0797     0.1049     0.1342     0.1100     0.0700     0.0400     0.0200     0
				0.4      0.0040     0.0047 0.0020     0.0272     0.0595     0.0891     0.1203     0.1000     0.0600     0.0400     0.0200     0
				0.6      0.0        0.0    0.0        0.0        0.0276     0.0718     0.1073     0.0800     0.0500     0.0300     0.0200     0
				0.8      0.0        0.0    0.0        0.0        0.0474     0.0868     0.0900     0.0700     0.0450     0.0250     0.0150     0
				1.0      0.0        0.0    0.0        0.0        0.0        0.0552     0.0800     0.0600     0.0400     0.0200     0.0150     0
				1.2      0.0        0.0    0.0        0.0        0.0        0.0552     0.0700     0.0500     0.0350     0.0200     0.0150     0
				1.4      0.0        0.0    0.0        0.0        0.0        0.0552     0.0700     0.0500     0.0350     0.0200     0.0150     0
				1.6      0.0        0.0    0.0        0.0        0.0        0.0552     0.0650     0.0500     0.0350     0.0200     0.0150     0
				1.8      0.0        0.0    0.0        0.0        0.0        0.0552     0.0630     0.0480     0.0330     0.0200     0.0150     0
				2.0      0.0        0.0    0.0        0.0        0.0        0.0552     0.0630     0.0460     0.0320     0.0190     0.0150     0
				2.2      0.0        0.0    0.0        0.0        0.0        0.0552     0.0630     0.0460     0.0320     0.0190     0.0140     0
				2.4      0.0        0.0    0.0        0.0        0.0        0.0552     0.0630     0.0450     0.0320     0.0190     0.0140     0
				2.6      0.0        0.0    0.0        0.0        0.0        0.0552     0.0630     0.0440     0.0320     0.0190     0.0140     0
				2.8      0.0        0.0    0.0        0.0        0.0        0.0552     0.0620     0.0440     0.0310     0.0190     0.0140     0
				3.0      0.0        0.0    0.0        0.0        0.0        0.0552     0.0620     0.0440     0.0310     0.0180     0.0140     0
				3.2      0.0        0.0    0.0        0.0        0.0        0.0552     0.0620     0.0440     0.0310     0.0180     0.0130     0
				3.4      0.0        0.0    0.0        0.0        0.0        0.0552     0.0610     0.0430     0.0310     0.0180     0.0130     0
				3.6      0.0        0.0    0.0        0.0        0.0        0.0552     0.0610     0.0430     0.0300     0.0180     0.0130     0
				3.8      0.0        0.0    0.0        0.0        0.0        0.0552     0.0610     0.0430     0.0300     0.0180     0.0130     0
				4.0      0.0        0.0    0.0        0.0        0.0        0.0552     0.0610     0.0430     0.0300     0.0170     0.0130     0
				4.2      0.0        0.0    0.0        0.0        0.0        0.0552     0.0610     0.0430     0.0300     0.0170     0.0120     0
				4.4      0.0        0.0    0.0        0.0        0.0        0.0552     0.0600     0.0420     0.0300     0.0170     0.0120     0
				4.6      0.0        0.0    0.0        0.0        0.0        0.0552     0.0500     0.0320     0.0220     0.0120     0.0080     0
				4.8      0.0        0.0    0.0        0.0        0.0        0.0552     0.0480     0.0320     0.0200     0.0100     0.0060     0
			</tableData>
		</table>
	</function>

	<function name="MilThrust">
		<table>
			<independentVar lookup="row">velocities/mach</independentVar>
			<independentVar lookup="column">atmosphere/density-altitude</independentVar>
			<tableData>
					-10000       0   10000   20000   30000   40000   50000   60000   70000   80000   90000  100000
				0.0   	1.2600  1.0000  0.7400  0.5340  0.3720  0.2410  0.1490  0.1290  0.0990  0.0690  0.0490  0
				0.2   	1.1710  0.9340  0.6970  0.5060  0.3550  0.2310  0.1430  0.1230  0.0930  0.0630  0.0430  0
				0.4   	1.1500  0.9210  0.6920  0.5060  0.3570  0.2330  0.1450  0.1250  0.0950  0.0650  0.0450  0
				0.6   	1.1810  0.9510  0.7210  0.5320  0.3780  0.2480  0.1540  0.1340  0.1040  0.0740  0.0540  0
				0.8   	1.2580  1.0200  0.7820  0.5820  0.4170  0.2750  0.1700  0.1500  0.1200  0.0900  0.0600  0
				1.0   	1.3690  1.1200  0.8710  0.6510  0.4750  0.3150  0.1950  0.1750  0.1450  0.1050  0.0750  0
				1.2   	1.4850  1.2300  0.9750  0.7440  0.5450  0.3640  0.2250  0.2050  0.1650  0.1350  0.0850  0
				1.4   	1.5941  1.3400  1.0860  0.8450  0.6280  0.4240  0.2630  0.2430  0.2030  0.1730  0.0930  0
				1.6   	1.6941  1.4400  1.1860  0.9450  0.7280  0.5240  0.3630  0.3430  0.3030  0.2730  0.1030  0
				1.8   	1.6941  1.4400  1.1860  0.9450  0.7280  0.5240  0.3630  0.3430  0.3030  0.2730  0.1030  0
				2.0   	1.6941  1.4400  1.1860  0.9450  0.7280  0.5240  0.3630  0.3430  0.3030  0.2730  0.1030  0
				2.2   	1.6941  1.4400  1.1860  0.9450  0.7280  0.5240  0.3630  0.3430  0.3030  0.2730  0.1030  0
				2.4   	1.6941  1.4400  1.1860  0.9450  0.7280  0.5240  0.3630  0.3430  0.3030  0.2730  0.1030  0
				2.6   	1.6941  1.4400  1.1860  0.9450  0.7280  0.5240  0.3630  0.3430  0.3030  0.2730  0.1030  0
				2.8   	1.6941  1.4400  1.1860  0.9450  0.7280  0.5240  0.3630  0.3430  0.3030  0.2730  0.1030  0
				3.0   	1.6941  1.4400  1.1860  0.9450  0.7280  0.5240  0.3630  0.3430  0.3030  0.2730  0.1030  0
				3.2   	1.6941  1.4400  1.1860  0.9450  0.7280  0.5240  0.3630  0.3430  0.3030  0.2730  0.1030  0
				3.4   	1.6941  1.4400  1.1860  0.9450  0.7280  0.5240  0.3630  0.3430  0.3030  0.2730  0.1030  0
				3.6   	1.6941  1.4400  1.1860  0.9450  0.7280  0.5240  0.3630  0.3430  0.3030  0.2730  0.1030  0
				3.8   	1.6941  1.4400  1.1860  0.9450  0.7280  0.5240  0.3630  0.3430  0.3030  0.2730  0.1030  0
				4.0   	1.6941  1.4400  1.1860  0.9450  0.7280  0.5240  0.3630  0.3430  0.3030  0.2730  0.1030  0
				4.2   	1.6941  1.4400  1.1860  0.9450  0.7280  0.5240  0.3630  0.3430  0.3030  0.2730  0.1030  0
				4.4   	1.6941  1.4400  1.1860  0.9450  0.7280  0.5240  0.3630  0.3430  0.3030  0.2730  0.1030  0
				4.6   	1.6941  1.4400  1.1860  0.9450  0.7280  0.5240  0.3630  0.3430  0.3030  0.2730  0.1030  0
				4.8   	1.6941  1.4400  1.1860  0.9450  0.7280  0.5240  0.3630  0.3430  0.3030  0.2730  0.1030  0
			</tableData>
		</table>
	</function>

	<function name="AugThrust">
		<table>
			<independentVar lookup="row">velocities/mach</independentVar>
			<independentVar lookup="column">atmosphere/density-altitude</independentVar>
			<tableData>
					-10000       0   10000   20000   30000   40000   50000   60000   70000   80000   90000  100000
				0.0    	1.1816  1.0000  0.8184  0.6627  0.5280  0.3756  0.2327  0.2127  0.1927  0.1327  0.1027  0
				0.2    	1.1308  0.9599  0.7890  0.6406  0.5116  0.3645  0.2258  0.2058  0.1858  0.1258  0.0958  0
				0.4    	1.1150  0.9474  0.7798  0.6340  0.5070  0.3615  0.2240  0.2040  0.1840  0.1240  0.0940  0
				0.6    	1.1284  0.9589  0.7894  0.6420  0.5134  0.3661  0.2268  0.2068  0.1868  0.1268  0.0968  0
				0.8    	1.1707  0.9942  0.8177  0.6647  0.5309  0.3784  0.2345  0.2145  0.1945  0.1345  0.1045  0
				1.0    	1.2411  1.0529  0.8648  0.7017  0.5596  0.3983  0.2467  0.2267  0.2067  0.1467  0.1067  0
				1.2    	1.3287  1.1254  0.9221  0.7462  0.5936  0.4219  0.2614  0.2414  0.2214  0.1614  0.1214  0
				1.4    	1.4365  1.2149  0.9933  0.8021  0.6360  0.4509  0.2794  0.2594  0.2394  0.1794  0.1394  0
				1.6    	1.5711  1.3260  1.0809  0.8700  0.6874  0.4860  0.3011  0.2811  0.2611  0.2011  0.1641  0
				1.8    	1.7301  1.4579  1.1857  0.9512  0.7495  0.5289  0.3277  0.3077  0.2877  0.2277  0.1877  0
				2.0    	1.8314  1.5700  1.3086  1.0474  0.8216  0.5786  0.3585  0.3385  0.3185  0.2585  0.2185  0
				2.2    	1.9700  1.6900  1.4100  1.2400  0.9100  0.6359  0.3940  0.3740  0.3540  0.2840  0.2540  0
				2.4    	2.0700  1.8000  1.5300  1.3400  1.0000  0.7200  0.4600  0.4400  0.4200  0.3600  0.3200  0
				2.6    	2.2000  1.9200  1.6400  1.4400  1.1000  0.8000  0.5200  0.5000  0.4800  0.4000  0.3800  0
				2.8    	2.3300  2.0400  1.7500  1.5400  1.2000  0.8800  0.5800  0.5600  0.4800  0.4000  0.3800  0
				3.0    	2.4600  2.1600  1.8600  1.6400  1.3000  0.9600  0.6400  0.6200  0.4800  0.4000  0.3800  0
				3.2    	2.5900  2.2800  1.9700  1.7400  1.4000  1.0400  0.7200  0.6800  0.4800  0.4000  0.3800  0
				3.4    	2.7200  2.4000  2.0800  1.8400  1.5000  1.1200  0.8000  0.7400  0.4800  0.4000  0.3800  0
				3.6    	2.8500  2.5200  2.1900  1.9400  1.6000  1.2000  0.8600  0.8000  0.4800  0.4000  0.3800  0
				3.8    	2.9800  2.6500  2.3000  2.0400  1.7000  1.2800  0.9200  0.8600  0.4800  0.4000  0.3800  0
				4.0    	3.0300  2.7700  2.4100  2.1400  1.8000  1.3600  0.9800  0.9200  0.4800  0.4000  0.3800  0
				4.2    	3.1600  2.8900  2.5200  2.2400  1.9000  1.4400  1.0400  0.9800  0.4800  0.4000  0.3800  0
				4.4    	3.2900  3.0200  2.6300  2.3400  2.0000  1.5200  1.1000  1.0400  0.4800  0.4000  0.3800  0
				4.6    	3.4200  3.1400  2.7400  2.4400  2.1000  1.6000  1.1600  1.2000  0.4800  0.4000  0.3800  0
				4.8    	3.5500  3.2600  2.8500  2.5400  2.2000  1.6800  1.2200  1.2600  0.4800  0.4000  0.3800  0
    </tableData>
   </table>
  </function>

  <function name="WaterInjection#">
   <table>
    <independentVar lookup="row">velocities/mach</independentVar>
    <independentVar lookup="column">atmosphere/density-altitude</independentVar>
    <tableData>
            0       50000
     0.0    1.2000  1.2000
     1.0    1.2000  1.2000
    </tableData>
   </table>
  </function>

</turbine_engine>
